# OpenSim document version 40500
AnalyzeTool 2D_gait_AFO_pc:
  model_file: 2D_gait_AFO_pc.osim
  replace_force_set: false
  output_precision: 8
  initial_time: 0
  final_time: 100
  solve_for_equilibrium_for_auxiliary_states: false
  maximum_number_of_integrator_steps: 20000
  maximum_integrator_step_size: 1
  minimum_integrator_step_size: 1e-8
  integrator_error_tolerance: 1e-5
  coordinates_file: C:\Users\Jeehoon_Hwang\OneDrive\SRBL\WearableOptimizedControl\Optimizer\Moco\prescribed_controller\gaitTracking_solution_fullStride.sto
  lowpass_cutoff_frequency_for_coordinates: -1
  AnalysisSet Analyses:
    PointKinematics: start_time=0 end_time=100 step_interval=1 in_degrees=true body_name=pelvis
        relative_to_body_name=none point_name=CoM point=(-0.0682778 0 0)
    PointKinematics: start_time=0 end_time=100 step_interval=1 in_degrees=true body_name=calcn_r
        relative_to_body_name=none point_name=CoP_R point=(0.177409 -0.0156538 0.00521792)
    PointKinematics: start_time=0 end_time=100 step_interval=1 in_degrees=true body_name=calcn_l
        relative_to_body_name=none point_name=CoP_L point=(0.177409 -0.0156538 -0.00521792)
    Kinematics: start_time=0 end_time=100 step_interval=1 in_degrees=false
